# Расчет шнекового конвейера
# Исходные данные
# Материал - Каустическая сода
# Насыпная плотность материала
ρ_н := 2.13  # т/м^3
# Длина конвейера
L := 2.6  # м
# Угол наклона конвейера
f := 15 deg  # град.
# Производительность
Q := 10  # т/ч
# Коэффициент заполнения желоба
φ := 0.25
# Отношение шага винта к диаметру винта
E := 0.8
# Частота вращения винта
n := 60  # об/мин
# Коэффициент уменьшения производительности
# от наклона конвейера
R_β := 0.7
# Коэффициент абразивности
A := 45
# Наибольший размер кусков материала
a_max := 0.0005  # м
# Определяем необходимый диаметр винта по формуле:
D := 0.275*Q/(E*n*φ*ρ_н*R_β) explicit, ALL → 0.275*10/(0.8*60*0.25*2.13*0.7) = 0.1537  # м
# Проверяем частоту вращения:
n_max := A/sqrt(D) explicit, ALL → 45/sqrt(0.153699977644) = 114.782  # об/мин
n ≤ n_max explicit, ALL → 60 ≤ 114.782482034 = 1
# Проверяем диаметр винта:
# Коэффициент для рядового груза
k := 4
D > a_max*k explicit, ALL → 0.153699977644 > 0.0005*4 = 1
# Подбираем стандартный диаметр и шаг винта из таблицы
D_ст := 0.16  # м
S_ст := 0.125  # м
# Уточняем частоту оборотов
n_ст := 0.275*Q/(E*D_ст*φ*ρ_н*R_β) explicit, ALL → 0.275*10/(0.8*0.16*0.25*2.13*0.7) = 57.6375  # об/мин
# Проверяем частоту вращения
n_ст ≤ A/sqrt(D_ст) explicit, ALL → 57.6374916164 ≤ 45/sqrt(0.16) = 1
# Таким образом, допустимая частота вращения винта
n_ст = 57.6375  # об/мин
# Определение мощности на валу винта
# Исходные данные
# Горизонтальная проекция длины конвейера
L_г := L*cos(f) explicit, ALL → 2.6*cos(15*deg) = 2.51141  # м
# Высота подъема
H := L*sin(f) explicit, ALL → 2.6*sin(15*deg) = 0.67293  # м
# Коэффициент сопротивления перемещению груза
ω := 2.5
# Коэффициент, учитывающий характер перемещения винта
R := 0.2
# Погонная масса вращающихся частей конвейера
g_k := 80*D_ст explicit, ALL → 80*0.16 = 12.8  # кг/м
# Коэффициент сопротивления движению вращающихся частей конвейера
ω_в := 0.16
# Осевая скорость движения груза
υ := S_ст*n_ст/60 explicit, ALL → 0.125*57.6374916164/60 = 0.120078  # м/с
# Мощность на валу винта:
N_0 := Q/367*(L_г*ω + H) + 0.02*R*g_k*L_г*ω_в explicit, ALL → 10/367*(2.51140714835*2.5 + 0.672929517267) + 0.02*0.2*12.8*2.51140714835*0.16 = 0.209986  # кВт
# Определение мощности двигателя для привода шнекового конвейера
# Исходные данные
# Коэффициент запаса мощности для приводов шнеков
K := 1.25
# КПД привода
η := 0.85
# Мощность двигателя:
N := K*N_0/η explicit, ALL → 1.25*0.209986182731/0.85 = 0.308803  # кВт
